*Heading
** Job name: KW_51 Model name: KW51_Static_Load
** Generated by: Abaqus/CAE 2022
*Preprint, echo=NO, model=NO, history=NO, contact=NO
** ----------------------------------------------------------------
**
** PART INSTANCE: Deck_Plate-1
**
*System
          0.,          0.,          0.,          1.,          0.,          0.
          0.,6.12323399573677e-17,          1.
*Node
      1,   113.656998,           0.,           0.
      2,   113.656998,   1.85000002,           0.
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*Element, type=S4R
1, 1, 2, 3, 4
2, 2, 5, 6, 3
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*Nset, nset=Deck_Plate-1_Deck_plate, generate
   1,  462,    1
*Elset, elset=Deck_Plate-1_Deck_plate, generate
   1,  416,    1
** Section: Deck_Plate_section
*Shell Section, elset=Deck_Plate-1_Deck_plate, material=Steel, offset=SNEG
0.015, 5
** ----------------------------------------------------------------
**
** PART INSTANCE: Ballast-1
**
*System
-2.8421709430404e-14,          0.,          0.,0.999999999999972,          0.,          0.
-2.8421709430404e-14,-1.83697019872103e-16,          1.
*Node
    463,         115.,        10.54,           0.
    464,           0.,        10.54,           0.
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*Element, type=S4R
417, 463, 491, 564, 466
418, 491, 492, 563, 564
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*Nset, nset=Ballast-1_Ballast_Set, generate
 463, 1008,    1
*Elset, elset=Ballast-1_Ballast_Set, generate
 417,  910,    1
** Section: Ballast_Section
*Shell Section, elset=Ballast-1_Ballast_Set, material=Ballast, offset=SPOS
0.6, 5
** ----------------------------------------------------------------
**
** PART INSTANCE: Rail-1
**
*System
        57.5,          0., 1129.191464,        58.5,          0., 1129.191464
        57.5,6.12323399573677e-17, 1128.191464
*Node
   1009,         57.5,   1119.52429,           0.
   1010,           0.,        1121.,           0.
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*Element, type=B31
911, 1009, 1021
912, 1021, 1022
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*Nset, nset=Rail-1_Set-1
1009,1010,1015,1017,1021,1022
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*Elset, elset=Rail-1_Set-1
 911, 912, 913, 914, 915, 916
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*Nset, nset=Rail-1_Set-2, generate
1009, 1164,    1
*Elset, elset=Rail-1_Set-2, generate
 911, 1062,    1
*Nset, nset=Rail-1_Set-3, generate
1009, 1164,    1
*Elset, elset=Rail-1_Set-3, generate
 911, 1062,    1
** Section: Rail_Section  Profile: Rail_Profile
*Beam Section, elset=Rail-1_Set-3, material=Rail_Steel, temperature=GRADIENTS, section=I
0., 0.172, 0.15, 0.05, 0.02, 0.05, 0.017
0.,-6.12323e-17,1.
** ----------------------------------------------------------------
**
** PART INSTANCE: Combined_Part-1
**
*System
*Node
   1165,   113.656998,           0.,   10.5500002
   1166,   113.656998,           0.,   9.76000023
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*Element, type=B31
1063, 1165, 1166
1064, 1166, 1167
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*Nset, nset=Combined_Part-1__PickedSet60_#9
1243,1312,1313,1314,1315,1316
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*Elset, elset=Combined_Part-1__PickedSet60_#9
 1263, 1264, 1265, 1266, 1267, 1268
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*Elset, elset=Combined_Part-1__PickedSet62_#11
 1256, 1257, 1258, 1259, 1260, 1261
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*Elset, elset=Combined_Part-1_Arch_Connector_Set
 1273, 1274, 1275, 1276, 1560, 1561, 1562, 1563, 1624, 1625, 1626, 1627, 2105, 2106, 2107, 2108
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*Elset, elset=Combined_Part-1_Stiffner_Set
 1077, 1079, 1081, 1083, 1085, 1087
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** Region: (Girders_Section:AllGirder_Set), (Beam Orientation:Picked)
*Elset, elset=Combined_Part-1__I1
 1063, 1064, 1065, 1066, 1067, 1068
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** Section: Girders_Section  Profile: Girders
*Beam Section, elset=Combined_Part-1__I1, material=Steel, temperature=GRADIENTS, section=I
0., 1.235, 0., 0.6, 0., 0.08, 0.08
1.,0.,0.
** Region: (Girders_Section:AllGirder_Set), (Beam Orientation:Picked)
*Elset, elset=Combined_Part-1__I2
 1075, 1164, 1165, 1205, 1395, 1416
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** Section: Girders_Section  Profile: Girders
*Beam Section, elset=Combined_Part-1__I2, material=Steel, temperature=GRADIENTS, section=I
0., 1.235, 0., 0.6, 0., 0.08, 0.08
0.,0.,1.
** Section: U_Stiffners  Profile: U_Stiffner
*Beam Section, elset=Combined_Part-1_Stiffner_Set, material=Steel, temperature=GRADIENTS, section=ARBITRARY
3, -0.125, 0., -0.125, -0.25, 0.008
0.125, -0.25, 0.008
0.125, 0., 0.008
0.,0.,-1.
** Region: (Girders_Section:AllGirder_Set), (Beam Orientation:Picked)
*Elset, elset=Combined_Part-1__I4
1100,1101,1102,1108,1190,1230
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** Section: Girders_Section  Profile: Girders
*Beam Section, elset=Combined_Part-1__I4, material=Steel, temperature=GRADIENTS, section=I
0., 1.235, 0., 0.6, 0., 0.08, 0.08
0.,0.,1.
** Section: Diagonal_Section  Profile: Diagonal_Profile
*Beam Section, elset=Combined_Part-1__PickedSet62_#11, material=Steel, temperature=GRADIENTS, section=BOX
0.345, 0.35, 0.016, 0.016, 0.016, 0.016
1.,0.,0.
** Section: Arch_Section  Profile: Arch
*Beam Section, elset=Combined_Part-1__PickedSet60_#9, material=Steel, temperature=GRADIENTS, section=BOX
0.86, 1.3, 0.045, 0.045, 0.045, 0.045
0.,0.,-1.
** Section: Arch_Connector_Section  Profile: Arch_Connector_Profile
*Beam Section, elset=Combined_Part-1_Arch_Connector_Set, material=Steel, temperature=GRADIENTS, section=PIPE
0.2, 0.02
0.,1.,0.
** Region: (Girders_Section:AllGirder_Set), (Beam Orientation:Picked)
*Elset, elset=Combined_Part-1__I8
1302,1303,1304,1305,1306,1307,1308,1309,1310,1311,1312,1393,1394
** Section: Girders_Section  Profile: Girders
*Beam Section, elset=Combined_Part-1__I8, material=Steel, temperature=GRADIENTS, section=I
0., 1.235, 0., 0.6, 0., 0.08, 0.08
-1.,0.,0.
** Region: (Girders_Section:AllGirder_Set), (Beam Orientation:Picked)
*Elset, elset=Combined_Part-1__I9
1946,1947,1949,1951,1953,1955,1957,1959,1961,1963,1965,1967,1969
** Section: Girders_Section  Profile: Girders
*Beam Section, elset=Combined_Part-1__I9, material=Steel, temperature=GRADIENTS, section=I
0., 1.235, 0., 0.6, 0., 0.08, 0.08
1.,0.,0.
*System
*Nset, nset=Rail_for_Load_Set, generate
1009, 1164,    1
*Elset, elset=Rail_for_Load_Set, generate
 911, 1062,    1
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*Nset, nset=Set-41
1440,
*Nset, nset=Set-42
1330,
*Nset, nset=Set-43
1243,
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*Nset, nset=Set-48
1566,
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*Nset, nset=m_Set-25, generate
   1,  462,    1
*Elset, elset=m_Set-25, generate
   1,  416,    1
*Nset, nset=m_Set-33
1165,1166,1167,1168,1169,1170
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*Nset, nset=m_Set-35
1165,1166,1167,1168,1169,1170
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*Nset, nset=s_Set-25, generate
 463, 1008,    1
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*Nset, nset=s_Set-49, generate
1009, 1164,    1
*Elset, elset=s_Set-49, generate
 911, 1062,    1
*Elset, elset=_Surf-5_END1, generate
 987, 1044,   19
*Surface, type=ELEMENT, name=Surf-5
_Surf-5_END1, END1
*Elset, elset=_Surf-6_END2, generate
1005, 1062,   19
*Surface, type=ELEMENT, name=Surf-6
_Surf-6_END2, END2
*Elset, elset=_Surf-7_END1
987,
*Surface, type=ELEMENT, name=Surf-7
_Surf-7_END1, END1
*Elset, elset=_Surf-8_END1
1025,
*Surface, type=ELEMENT, name=Surf-8
_Surf-8_END1, END1
*Elset, elset=_Surf-9_SNEG, generate
 835,  872,    1
*Surface, type=ELEMENT, name=Surf-9
_Surf-9_SNEG, SNEG
*Elset, elset=_m_Surf-1_SPOS, generate
   1,  416,    1
*Surface, type=ELEMENT, name=m_Surf-1
_m_Surf-1_SPOS, SPOS
*Elset, elset=_m_Surf-5_SNEG, generate
   1,  416,    1
*Surface, type=ELEMENT, name=m_Surf-5
_m_Surf-5_SNEG, SNEG
*Elset, elset=_s_Surf-1_SPOS, generate
 417,  910,    1
*Surface, type=ELEMENT, name=s_Surf-1
_s_Surf-1_SPOS, SPOS
*Elset, elset=_s_Surf-3_SPOS, generate
   1,  416,    1
*Surface, type=ELEMENT, name=s_Surf-3
_s_Surf-3_SPOS, SPOS
*Surface, type=NODE, name=m_Set-35_CNS_
m_Set-35, 1.
*Surface, type=NODE, name=m_Set-25_CNS_
m_Set-25, 1.
*Surface, type=NODE, name=s_Set-25_CNS_
s_Set-25, 1.
*Surface, type=NODE, name=s_Set-49_CNS_
s_Set-49, 1.
** Constraint: Constraint-5
*Tie, name=Constraint-5, adjust=yes
s_Surf-3, m_Set-35_CNS_
** Constraint: Constraint-8
*Tie, name=Constraint-8, adjust=yes
s_Set-25_CNS_, m_Set-25_CNS_
** Constraint: Constraint-9
*Tie, name=Constraint-9, adjust=yes
s_Set-49_CNS_, m_Surf-5
*Amplitude, name=Amp-1, definition=EQUALLY SPACED, fixed interval=1.
             1.,              1.
**
** MATERIALS
**
*Material, name=Ballast
*Damping, alpha=0.7, beta=0.5
*Density
1900.,
*Elastic
 5.5e+08, 0.33
*Material, name=Rail_Steel
*Damping, alpha=0.7, beta=0.5
*Density
6470.,
*Elastic
 2.1e+11, 0.3
*Material, name=Steel
*Damping, alpha=0.7, beta=0.5
*Density
7750.,
*Elastic
 2.1e+11, 0.3
**
** BOUNDARY CONDITIONS
**
** Name: BC-1 Type: Displacement/Rotation
*Boundary
Set-48, 1, 1
Set-48, 2, 2
Set-48, 3, 3
** Name: BC-3 Type: Displacement/Rotation
*Boundary
Set-41, 1, 1
Set-41, 2, 2
** Name: BC-4 Type: Displacement/Rotation
*Boundary
Set-42, 2, 2
Set-42, 3, 3
** Name: BC-5 Type: Displacement/Rotation
*Boundary
Set-43, 2, 2
** ----------------------------------------------------------------
**
** STEP: Step-2
**
*Step, name=Step-2, nlgeom=NO
*Static, direct
1., 1.,
**
** LOADS
**
** Name: Load-2   Type: Line load
*Dload
Rail_for_Load_Set, PY, -10000.
**
** OUTPUT REQUESTS
**
*Restart, write, frequency=0
**
** FIELD OUTPUT: F-Output-2
**
*Output, field
*Node Output
CF, RF, RM, RT, TF, U, UR, UT
V, VF, VR, VT
*Element Output, directions=YES
ALPHA, ALPHAN, BF, CENTMAG, CENTRIFMAG, CORIOMAG, CS11, CTSHR, E, EE, EEQUT, ER, ESF1, GRAV, HP, IE
LE, LODE, MISES, MISESMAX, MISESONLY, NE, NFORC, NFORCSO, P, PE, PEEQ, PEEQMAX, PEEQT, PEMAG, PEQC, PRESSONLY
PS, ROTAMAG, S, SALPHA, SE, SEE, SEP, SEPE, SEQUT, SF, SPE, SQEQ, SSAVG, TE, TEEQ, TEVOL
THE, TRIAX, TRNOR, TRSHR, TSHR, VE, VEEQ, VS, YIELDPOT
**
** HISTORY OUTPUT: H-Output-2
**
*Output, history, variable=PRESELECT
*End Step
